// SBML level 2 version 4
// This model was downloaded from BioModels Database
// http://www.ebi.ac.uk/biomodels-static/

model MODEL1502270000()
  // Weisse2015 - Cell Growth
  // biomodels.db:MODEL1502270000

  // Compartments:
  compartment cell = 1;

  // Species:
  species rmr in cell = 0;
  species em in cell = 0;
  species rmp in cell = 0;
  species rmq in cell = 0;
  species rmt in cell = 0;
  species et in cell = 0;
  species rmm in cell = 0;
  species zmm in cell = 0;
  species zmr in cell = 0;
  species zmp in cell = 0;
  species zmq in cell = 0;
  species zmt in cell = 0;
  species mt in cell = 0;
  species mm in cell = 0;
  species q in cell = 0;
  species p in cell = 0;
  species si in cell = 0;
  species mq in cell = 0;
  species mp in cell = 0;
  species mr in cell = 0;
  species r in cell = 10/cell;
  species a in cell = 1000/cell;

  // Parameters:
  thetar = 426.8693;
  k_cm = 0.005990373;
  s0 = 10000;
  gmax = 1260;
  cl = 0;
  thetax = 4.379733;
  Kt = 1000;
  M = 100000000;
  we = 4.139172;
  Km = 1000;
  vm = 5800;
  nx = 300;
  Kq = 152219;
  Kp = 180.1378;
  vt = 726;
  wr = 929.9679;
  wq = 948.935;
  wp = 0;
  nq = 4;
  nr = 7549;
  ns = 0.5;
  b = 0;
  dm = 0.1;
  kb = 1;
  ku = 1;

  // Assignment rules:
  f := cl*k_cm;
  Kgamma := gmax/Kp;
  gamma := gmax*a/(Kgamma + a);
  ttrate := (rmq + rmr + rmp + rmt + rmm)*gamma;
  lam := ttrate/M;
  fr := nr*(r + rmr + rmp + rmt + rmm + rmq + zmr + zmp + zmt + zmm + zmq)/(nr*(r + rmr + rmp + rmt + rmm + rmq + zmr + zmp + zmt + zmm + zmq) + nx*(p + q + et + em));
  nucat := em*vm*si/(Km + si);

  // Reactions:
  r_25_f: rmt => zmt; f*rmt;
  r_25_b: zmt => rmt; b*zmt;
  r_48: zmm => ; lam*zmm;  // modifiers: rmr, a, rmp, rmq, rmt, rmm
  r_43: q => ; lam*q;  // modifiers: rmr, a, rmp, rmq, rmt, rmm
  r_27_b: zmp => rmp; b*zmp;
  r_49: zmp => ; lam*zmp;  // modifiers: rmr, a, rmp, rmq, rmt, rmm
  r_27_f: rmp => zmp; f*rmp;
  r_26_b: zmm => rmm; b*zmm;
  r_26_f: rmm => zmm; f*rmm;
  r_20: mt => ; dm*mt;
  r_21: mm => ; dm*mm;
  r_22: mp => ; dm*mp;
  r_23: mq => ; dm*mq;
  r_46: zmr => ; lam*zmr;  // modifiers: rmr, a, rmp, rmq, rmt, rmm
  r_47: zmt => ; lam*zmt;  // modifiers: rmr, a, rmp, rmq, rmt, rmm
  r_44: a => ; lam*a;  // modifiers: rmr, rmp, rmq, rmt, rmm
  r_45: si => ; lam*si;  // modifiers: rmr, a, rmp, rmq, rmt, rmm
  r_42: p => ; lam*p;  // modifiers: rmr, a, rmp, rmq, rmt, rmm
  r_29: mr => ; lam*mr;  // modifiers: rmr, a, rmp, rmq, rmt, rmm
  r_40: et => ; lam*et;  // modifiers: rmr, a, rmp, rmq, rmt, rmm
  r_41: em => ; lam*em;  // modifiers: rmr, a, rmp, rmq, rmt, rmm
  r_1: si => ; nucat;  // modifiers: em
  r_0: => si; et*vt*s0/(Kt + s0);  // modifiers: et
  r_3: a => ; ttrate;  // modifiers: rmr, rmp, rmq, rmt, rmm
  r_2: => a; ns*nucat;  // modifiers: em, si
  r_5: => mt; we*a/(thetax + a);  // modifiers: a
  r_4: => mr; wr*a/(thetar + a);  // modifiers: a
  r_7: => mp; wp*a/(thetax + a);  // modifiers: a
  r_6: => mm; we*a/(thetax + a);  // modifiers: a
  r_8: => mq; wq*a/(thetax + a)/(1 + (q/Kq)^nq);  // modifiers: a, q
  r_10_f: r + mt => rmt; kb*r*mt;
  r_10_b: rmt => r + mt; ku*rmt;
  r_11_f: r + mm => rmm; kb*r*mm;
  r_11_b: rmm => r + mm; ku*rmm;
  r_12_b: rmp => r + mp; ku*rmp;
  r_12_f: r + mp => rmp; kb*r*mp;
  r_28_b: zmq => rmq; b*zmq;
  r_13_b: rmq => r + mq; ku*rmq;
  r_28_f: rmq => zmq; f*rmq;
  r_13_f: r + mq => rmq; kb*r*mq;
  r_39: r => ; lam*r;  // modifiers: rmr, a, rmp, rmq, rmt, rmm
  r_38: rmq => ; lam*rmq;  // modifiers: rmr, a, rmp, rmt, rmm
  r_15: rmt => r + et + mt; gamma/nx*rmt;  // modifiers: a
  r_14: rmr => r + r + mr; gamma/nr*rmr;  // modifiers: a
  r_17: rmp => r + p + mp; gamma/nx*rmp;  // modifiers: a
  r_16: rmm => r + em + mm; gamma/nx*rmm;  // modifiers: a
  r_18: rmq => r + q + mq; gamma/nx*rmq;  // modifiers: a
  r_31: mm => ; lam*mm;  // modifiers: rmr, a, rmp, rmq, rmt, rmm
  r_30: mt => ; lam*mt;  // modifiers: rmr, a, rmp, rmq, rmt, rmm
  r_37: rmp => ; lam*rmp;  // modifiers: rmr, a, rmq, rmt, rmm
  r_36: rmm => ; lam*rmm;  // modifiers: rmr, a, rmp, rmq, rmt
  r_35: rmt => ; lam*rmt;  // modifiers: rmr, a, rmp, rmq, rmm
  r_34: rmr => ; lam*rmr;  // modifiers: a, rmp, rmq, rmt, rmm
  r_33: mq => ; lam*mq;  // modifiers: rmr, a, rmp, rmq, rmt, rmm
  r_32: mp => ; lam*mp;  // modifiers: rmr, a, rmp, rmq, rmt, rmm
  r_50: zmq => ; lam*zmq;  // modifiers: rmr, a, rmp, rmq, rmt, rmm
  r_24_b: zmr => rmr; b*zmr;
  r_19: mr => ; dm*mr;
  r_9_f: r + mr => rmr; kb*r*mr;
  r_9_b: rmr => r + mr; ku*rmr;
  r_24_f: rmr => zmr; f*rmr;
end
